// COMSOL Multiphysics 6.0.0.354 model "mf_1000 by 1000 per SP_20220726.mph"
// Outline of the model tree

Parameters
  rtol = 1e-2
  atol = 1e-4
  Ec = 1[uV/cm]
  w = 4.1[mm]
  th = 0.12[mm]
  n = 21
  a1 = 50[mm]
  nTurn = 78
  a2 = a1+th*nTurn
  b1 = -((w+spacer)*nSP)/2
  nSP = 12
  spacer = 0.2[mm]
  Ic = 300[A]
  Iop = 100[A]
  Jc = Ic/w/th

Functions
  rm1: Ramp | location = 0.01; slope = Iop; cutoff = Iop; smoothzoneloc = 0.01; smoothzonecutoff = 0.01; smoothloc = true; smoothcutoff = true; smoothzone = 0.01

Geometry
  geom1 "Geometry 1" (2D axisymmetric, length unit mm)
    r1: Rectangle "SP1" | pos = {a1, b1+spacer/2}; size = {a2-a1, w}
    arr1: Array | input = r1; size = nSP; type = linear; linearsize = nSP; displ = {0, w+spacer}
    r2: Rectangle "Air" | pos = {0, -2000}; size = {4000, 4000}
    b1: BezierPolygon "Bézier Polygon 1" | p = {{0, 0}, {-20, 20}}; degree = 1; w = {1, 1}
    fin: Finalize "Form Union"

Materials
  mat1: Common "Air" on all domains
    def "Basic"
      relpermeability = 1
      relpermittivity = 1
      dynamicviscosity = eta(T[1/K])[Pa*s]
      ratioofspecificheat = 1.4
      electricconductivity = 0[S/m]
      heatcapacity = Cp(T[1/K])[J/(kg*K)]
      density = rho(pA[1/Pa],T[1/K])[kg/m^3]
      thermalconductivity = k(T[1/K])[W/(m*K)]
      soundspeed = cs(T[1/K])[m/s]
      eta: Piecewise | arg = T; pieces = {200.0, 1600.0, -8.38278E-7+8.35717342E-8*T^1-7.69429583E-11*T^2+4.6437266E-14*T^3-1.06585607E-17*T^4}
      Cp: Piecewise | arg = T; pieces = {200.0, 1600.0, 1047.63657-0.372589265*T^1+9.45304214E-4*T^2-6.02409443E-7*T^3+1.2858961E-10*T^4}
      rho: Analytic | expr = pA*0.02897/8.314/T; args = {pA, T}; dermethod = manual; argders = {{pA, d(pA*0.02897/8.314/T,pA)}, {T, d(pA*0.02897/8.314/T,T)}}
      k: Piecewise | arg = T; pieces = {200.0, 1600.0, -0.00227583562+1.15480022E-4*T^1-7.90252856E-8*T^2+4.11702505E-11*T^3-7.43864331E-15*T^4}
      cs: Analytic | expr = sqrt(1.4*287*T); args = T; dermethod = manual; argders = {T, d(sqrt(1.4*287*T),T)}
    RefractiveIndex
      n = 1
      ki = 0

Physics
  mf: InductionCurrents "Magnetic Fields" on all domains
    dependent variable A = {Ar, Aphi, Az}
    al1: AmperesLaw "Ampère's Law 1" (default)
    axi1: AxialSymmetry (default)
    mi1: MagneticInsulation (default)
    init1: init "Initial Values 1" (default)
    ecd1: ExternalCurrentDensity on domains 2-13 | Je = {0, Iop/w/th, 0}

Mesh
  mesh1 "Mesh 1"
    size: MeshSizeDefault | hmax = 268; hmin = 1.2; hcurve = 0.3; hgrad = 1.3
    map1: Map "Mapped 1" on domains 2-13
      dis1: Distribution on boundaries 7, 8, 10, 11, 13, 14, 16, 17, 19, 20, 22, 23, 25, 26, 28, 29, 31, 32, 34, 35, 37, 38, 40, 41
        numelem = 1000
      dis2: Distribution on boundaries 6, 9, 12, 15, 18, 21, 24, 27, 30, 33, 36, 39, 42-53 | numelem = 100
    conv1: Convert on domains 2-13
    ftri2: FreeTri "Free Triangular 2" on domains 1
      size1: Size on domains 1
      dis1: Distribution on boundaries 3 | numelem = 400

Studies
  std2 "Study 2"
    stat: Stationary

Solver configurations
  sol2 "Solution 2" (study std2)
    v1: Variables "Dependent Variables 1"
    s1: Stationary "Stationary Solver 1"
      dDef: Direct
      fc1: FullyCoupled | linsolver = dDef

Datasets
  dset1: Solution | solution = sol2
  rev1: Revolve2D "Revolution 2D 1" | data = dset1; startangle = -90; revangle = 225
  dset2: Solution on domains 2-13 | solution = sol2
  cln1: CutLine2D | data = dset1; genpoints = {{0, -20}, {0, 20}}
  rev2: Revolve2D "Revolution 2D 2" | data = dset2; startangle = -90; revangle = 225

Plots
  pg1: PlotGroup2D "Magnetic Flux Density Norm (mf)" | data = dset1
    surf1: Surface | expr = mf.normB
  pg2: PlotGroup3D "Magnetic Flux Density Norm, Revolved Geometry (mf)" | data = rev1
    surf1: Surface | expr = mf.normB
  pg3: PlotGroup2D "2D Plot Group 3" | data = dset2
    surf1: Surface | expr = mf.normJ; unit = A/mm^2; wireframe = on
  pg4: PlotGroup1D "1D Plot Group 4" | data = dset1
    lngr1: LineGraph on boundaries 3 | expr = mf.normB

Exports
  data1: Data
    data = dset2
    expr = mf.normJ
    filename = D:\2. Conference\2019_MT26\Harm Coeff\paper\_simulation\Uniform Current Density\J_1000by100 per SP.txt
  data2: Data
    data = cln1
    expr = mf.Bz
    filename = D:\2. Conference\2019_MT26\Harm Coeff\paper\_simulation\Uniform Current Density\Bz_1000by100 per SP.txt