// COMSOL Multiphysics 6.0.0.354 model "pde_100by40 per SP_20220726.mph"
// Outline of the model tree

Parameters
  rtol = 1e-2
  atol = 1e-4
  Ec = 1[uV/cm]
  w = 4.1[mm]
  th = 0.12[mm]
  n = 21
  a1 = 50[mm]
  nTurn = 78
  a2 = a1+th*nTurn
  b1 = -((w+spacer)*nSP)/2
  nSP = 12
  spacer = 0.2[mm]
  Ic = 300[A]
  Iop = 100[A]
  Jc = Ic/w/th

Functions
  rm1: Ramp | location = 0.1; slope = Iop; cutoff = Iop; smoothloc = true; smoothcutoff = true; smoothzone = 0.1

Variables
  var32 "ScalarExpression"
    J = Hrz-Hzr
    E = rho*J
    mu = mu0_const
    Br = mu0_const*Hr*1[1/T]
    Bz = mu0_const*Hz*1[1/T]
    BB = sqrt(Br^2+Bz^2+1e-6)  // 1e-6 is needed for singularity at Bz=0 and Br=0
    AA = acos(abs(Bz)/BB)[1/rad]*180/pi  // Field angle
  var33 "Air" on domains 1
    rho = 1[ohm*m]
  var34 "Magnet" on domains 2-13
    rho = (Ec/Jc)*abs(J/Jc)^(n-1)

Couplings
  linproj1: LinearProjection on domains 2
    srcvertex1 = points 6
    srcvertex2 = points 30
    srcvertex3 = points 5
    dstvertex1 = points 5
    dstvertex2 = points 29
    dstgeom = geom1
  linproj2: LinearProjection on domains 3
    srcvertex1 = points 8
    srcvertex2 = points 32
    srcvertex3 = points 7
    dstvertex1 = points 7
    dstvertex2 = points 31
    dstgeom = geom1
  linproj4: LinearProjection on domains 4
    opname = linproj3
    srcvertex1 = points 10
    srcvertex2 = points 34
    srcvertex3 = points 9
    dstvertex1 = points 9
    dstvertex2 = points 33
    dstgeom = geom1
  linproj3: LinearProjection on domains 5
    opname = linproj4
    srcvertex1 = points 12
    srcvertex2 = points 36
    srcvertex3 = points 11
    dstvertex1 = points 11
    dstvertex2 = points 35
    dstgeom = geom1
  linproj5: LinearProjection on domains 6
    srcvertex1 = points 14
    srcvertex2 = points 38
    srcvertex3 = points 13
    dstvertex1 = points 13
    dstvertex2 = points 37
    dstgeom = geom1
  linproj6: LinearProjection on domains 7
    srcvertex1 = points 16
    srcvertex2 = points 40
    srcvertex3 = points 15
    dstvertex1 = points 15
    dstvertex2 = points 39
    dstgeom = geom1
  linproj7: LinearProjection on domains 8
    srcvertex1 = points 18
    srcvertex2 = points 42
    srcvertex3 = points 17
    dstvertex1 = points 17
    dstvertex2 = points 41
    dstgeom = geom1
  linproj8: LinearProjection on domains 9
    srcvertex1 = points 20
    srcvertex2 = points 44
    srcvertex3 = points 19
    dstvertex1 = points 19
    dstvertex2 = points 43
    dstgeom = geom1
  linproj9: LinearProjection on domains 10
    srcvertex1 = points 22
    srcvertex2 = points 46
    srcvertex3 = points 21
    dstvertex1 = points 21
    dstvertex2 = points 45
    dstgeom = geom1
  linproj10: LinearProjection on domains 11
    srcvertex1 = points 24
    srcvertex2 = points 48
    srcvertex3 = points 23
    dstvertex1 = points 23
    dstvertex2 = points 47
    dstgeom = geom1
  linproj11: LinearProjection on domains 12
    srcvertex1 = points 26
    srcvertex2 = points 50
    srcvertex3 = points 25
    dstvertex1 = points 25
    dstvertex2 = points 49
    dstgeom = geom1
  linproj12: LinearProjection on domains 13
    srcvertex1 = points 28
    srcvertex2 = points 52
    srcvertex3 = points 27
    dstvertex1 = points 27
    dstvertex2 = points 51
    dstgeom = geom1

Geometry
  geom1 "Geometry 1" (2D axisymmetric, length unit mm)
    r1: Rectangle "SP1" | pos = {a1, b1+spacer/2}; size = {a2-a1, w}
    arr1: Array | input = r1; size = nSP; type = linear; linearsize = nSP; displ = {0, w+spacer}
    r2: Rectangle "Air" | pos = {0, -2000}; size = {4000, 4000}
    b1: BezierPolygon "Bézier Polygon 1" | p = {{0, 0}, {-20, 20}}; degree = 1; w = {1, 1}
    fin: Finalize "Form Union"

Physics
  g: GeneralFormPDE on all domains
    dependent variable H = {Hr, Hz}
    ShapeProperty.shapeFunctionType = shcurl
    ShapeProperty.order = 1
    Units.DependentVariableQuantity = magneticfield
    Units.CustomSourceTermUnit = V/m
    gfeq1: GeneralFormPDE (default) | f = {0, 0}; Ga = {{0, -r*E}, {r*E, 0}}; da = {mu*r, 0, 0, mu*r}
    zflx1: ZeroFluxBoundary "Zero Flux 1" (default)
    init1: init "Initial Values 1" (default)
    wc1: WeakConstraint on boundaries 7 | constraintExpression = rm1(t[1/s])/th-linproj1(J)
    wc2: WeakConstraint on boundaries 10 | constraintExpression = rm1(t[1/s])/th-linproj2(J)
    wc3: WeakConstraint on boundaries 13 | constraintExpression = rm1(t[1/s])/th-linproj3(J)
    wc4: WeakConstraint on boundaries 16 | constraintExpression = rm1(t[1/s])/th-linproj4(J)
    wc5: WeakConstraint on boundaries 19 | constraintExpression = rm1(t[1/s])/th-linproj5(J)
    wc6: WeakConstraint on boundaries 22 | constraintExpression = rm1(t[1/s])/th-linproj6(J)
    wc7: WeakConstraint on boundaries 25 | constraintExpression = rm1(t[1/s])/th-linproj7(J)
    wc8: WeakConstraint on boundaries 28 | constraintExpression = rm1(t[1/s])/th-linproj8(J)
    wc9: WeakConstraint on boundaries 31 | constraintExpression = rm1(t[1/s])/th-linproj9(J)
    wc10: WeakConstraint on boundaries 34 | constraintExpression = rm1(t[1/s])/th-linproj10(J)
    wc11: WeakConstraint on boundaries 37 | constraintExpression = rm1(t[1/s])/th-linproj11(J)
    wc12: WeakConstraint on boundaries 40 | constraintExpression = rm1(t[1/s])/th-linproj12(J)

Mesh
  mesh1 "Mesh 1"
    size: MeshSizeDefault | hmax = 268; hmin = 1.2; hcurve = 0.3; hgrad = 1.3
    map1: Map "Mapped 1" on domains 2-13
      dis1: Distribution on boundaries 7, 8, 10, 11, 13, 14, 16, 17, 19, 20, 22, 23, 25, 26, 28, 29, 31, 32, 34, 35, 37, 38, 40, 41
        numelem = 100
      dis2: Distribution on boundaries 6, 9, 12, 15, 18, 21, 24, 27, 30, 33, 36, 39, 42-53 | numelem = 40
    conv1: Convert on domains 2-13
    ftri2: FreeTri "Free Triangular 2" on domains 1
      size1: Size on domains 1
      dis1: Distribution on boundaries 3 | numelem = 400

Studies
  std1 "Study 1"
    time: Transient "Time Dependent" | tlist = range(0,0.1,1.2); rtol = rtol

Solver configurations
  sol1 "Solution 1" (study std1)
    v1: Variables "Dependent Variables 1"
      comp1_H: Field "Dependent variable H (comp1.H)" | scalemethod = manual; scaleval = 1e6
      comp1_lm: Field "Auxiliary dependent variable lm (comp1.lm)" | scalemethod = manual; scaleval = 1e8
      comp1_lm1: Field "Auxiliary dependent variable lm1 (comp1.lm1)" | scalemethod = manual; scaleval = 1e8
      comp1_lm2: Field "Auxiliary dependent variable lm2 (comp1.lm2)" | scalemethod = manual; scaleval = 1e8
      comp1_lm3: Field "Auxiliary dependent variable lm3 (comp1.lm3)" | scalemethod = manual; scaleval = 1e8
      comp1_lm4: Field "Auxiliary dependent variable lm4 (comp1.lm4)" | scalemethod = manual; scaleval = 1e8
      comp1_lm5: Field "Auxiliary dependent variable lm5 (comp1.lm5)" | scalemethod = manual; scaleval = 1e8
      comp1_lm6: Field "Auxiliary dependent variable lm6 (comp1.lm6)" | scalemethod = manual; scaleval = 1e8
      comp1_lm7: Field "Auxiliary dependent variable lm7 (comp1.lm7)" | scalemethod = manual; scaleval = 1e8
      comp1_lm8: Field "Auxiliary dependent variable lm8 (comp1.lm8)" | scalemethod = manual; scaleval = 1e8
      comp1_lm9: Field "Auxiliary dependent variable lm9 (comp1.lm9)" | scalemethod = manual; scaleval = 1e8
      comp1_lm10: Field "Auxiliary dependent variable lm10 (comp1.lm10)" | scalemethod = manual; scaleval = 1e8
      comp1_lm11: Field "Auxiliary dependent variable lm11 (comp1.lm11)" | scalemethod = manual; scaleval = 1e8
    t1: Time "Time-Dependent Solver 1"
      tlist = range(0,0.1,1.2)
      rtol = rtol
      atolglobal = atol
      atolmethod = {comp1_H, global, comp1_lm, global, comp1_lm1, global, comp1_lm2, global, comp1_lm3, global, comp1_lm4, global, comp1_lm5, global, comp1_lm6, global, comp1_lm7, global, comp1_lm8, global, comp1_lm9, global, comp1_lm10, global, comp1_lm11, global}
      atol = {comp1_H, 1e-3, comp1_lm, 1e-3, comp1_lm1, 1e-3, comp1_lm2, 1e-3, comp1_lm3, 1e-3, comp1_lm4, 1e-3, comp1_lm5, 1e-3, comp1_lm6, 1e-3, comp1_lm7, 1e-3, comp1_lm8, 1e-3, comp1_lm9, 1e-3, comp1_lm10, 1e-3, comp1_lm11, 1e-3}
      atoludot = {comp1_H, 1e-3, comp1_lm, 1e-3, comp1_lm1, 1e-3, comp1_lm2, 1e-3, comp1_lm3, 1e-3, comp1_lm4, 1e-3, comp1_lm5, 1e-3, comp1_lm6, 1e-3, comp1_lm7, 1e-3, comp1_lm8, 1e-3, comp1_lm9, 1e-3, comp1_lm10, 1e-3, comp1_lm11, 1e-3}
      stabcntrl = on
      fieldselection = comp1_H
      dDef: Direct
      fc1: FullyCoupled | ntolfact = 1e-3; stabacc = aacc

Datasets
  dset1: Solution | solution = sol1
  rev1: Revolve2D "Revolution 2D 1" | data = dset1; startangle = -90; revangle = 225
  dset2: Solution on domains 2-13 | solution = sol1
  cln1: CutLine2D | data = dset1; genpoints = {{0, -10}, {0, 10}}

Plots
  pg1: PlotGroup2D "2D Plot Group 1" | data = dset2
    surf1: Surface | expr = J; unit = A/mm^2; wireframe = on
  pg2: PlotGroup1D "1D Plot Group 2" | data = cln1
    lngr1: LineGraph | expr = Bz; unit = 1; xdata = expr; xdataexpr = z

Exports
  anim1: Animation | target = player
  data1: Data
    data = cln1
    expr = Bz[T]
    filename = D:\2. Conference\2019_MT26\Harm Coeff\paper\_simulation\Non-uniform Current Density\Bz_300by100 per SP.txt